Parameteranalyse
Parameter
g_0 := 9.807 m/s^2
ξ_0 := 2/3
b_Motor0 := 9.12*10^-8 N*m*s
m_ges0 := 1 kg
J_Bot0 := 0.0072 kg*m^2
k_t0 := 0.0174 N*m/A
l_Achse0 := 0.15 m
μ_Boden0 := 0.1
k_b0 := 0.035 V*s/rad
u_Motor0 := 100
J_Motor0 := 0.847*10^-6 kg*m^2
r_Reifen0 := 0.04 m
l_B_R0 := 0.25 m
L_Motor0 := 0.0002 H
l_Blöcke0 := 0.15 m
R_Motor0 := 13.33 Ω
[d/dt(i); d/dt(ω)]*[-R_Motor/L_Motor, -k_b/L_Motor; k_t/J_Motor, -b_Motor/J_Motor]*[i; ω] + [1/L_Motor, 0; 0, -1/J_Motor]*[U_e; T_L]
solve block
    # constraints
    [d/dt(i(t)); d/dt(ω(t))] ≥ [-R_Motor/L_Motor, -k_b/L_Motor; k_t/J_Motor, -b_Motor/J_Motor]*[i; ω] + [1/L_Motor, 0; 0, -1/J_Motor]*[U_e; T_L]
end solve block
[d/dt(i_1(t)); d/dt(ω_1(t))] == [-R_Motor/L_Motor, -k_b/L_Motor; k_t/J_Motor, -b_Motor/J_Motor]*[i_1; ω_1] + [1/L_Motor, 0; 0, -1/J_Motor]*[U_e1; T_L1]
